<?xml version="1.0"?>
<?xml-stylesheet type="text/xsl" href="http://jsbsim.sourceforge.net/JSBSim.xsl"?>
<fdm_config name="unnamed" version="2.0" release="ALPHA"
   xmlns:xsi="http://www.w3.org/2001/XMLSchema-instance"
   xsi:noNamespaceSchemaLocation="http://jsbsim.sourceforge.net/JSBSim.xsd">

 <fileheader>
  <author>Daniel Overbeck</author>
  <filecreationdate>2020-01-05</filecreationdate>
  <version>V0.1</version>
  <description>MiG-25</description>
  <reference refID="" author="н.н. котов" title="практическая аэродинамика самолета миг-25рб" date="1978"/>
 </fileheader>

 <metrics>
   <wingarea  unit="M2"> 61.4 </wingarea> <!-- table 1.2 -->
   <wingspan  unit="M" > 13.4 </wingspan> <!-- table 1.2 -->
   <wing_incidence>       2.0 </wing_incidence>
   <chord     unit="M" >  5.0 </chord> <!-- table 1.2 -->
   <htailarea unit="M2">  4.0 </htailarea>
   <htailarm  unit="M" > 10.0 </htailarm>
   <vtailarea unit="M2">  7.0 </vtailarea>
   <vtailarm  unit="M" >  9.0 </vtailarm>
   <location name="AERORP" unit="M">
     <x> 3.6 </x>
     <y> 0.0 </y>
     <z> 0.5 </z>
   </location>
   <location name="EYEPOINT" unit="M">
     <x> -3.0 </x>
     <y>  0.0 </y>
     <z>  1.2 </z>
   </location>
   <location name="VRP" unit="M">
     <x>0</x>
     <y>0</y>
     <z>0</z>
   </location>
 </metrics>

 <mass_balance>
   <location name="CG" unit="M">
     <x> 3.5 </x>
     <y> 0.0 </y>
     <z> 0.5 </z>
   </location>
   <ixx unit="SLUG*FT2">  70000 </ixx>
   <iyy unit="SLUG*FT2"> 245000 </iyy>
   <izz unit="SLUG*FT2"> 235000 </izz>
   <emptywt unit="KG" >   20000 </emptywt>
   <pointmass name="Left Pylon0">
      <weight unit="LBS"> 0 </weight>
      <location name="POINTMASS" unit="M">
         <x>  4.4 </x>
         <y> -4.5 </y>
         <z> -0.1 </z>
      </location>
   </pointmass>
   <pointmass name="Left Pylon1">
      <weight unit="LBS"> 0 </weight>
      <location name="POINTMASS" unit="M">
         <x>  3.3 </x>
         <y> -3.3 </y>
         <z>  0.0 </z>
      </location>
   </pointmass>
   <pointmass name="Right Pylon2">
      <weight unit="LBS"> 0 </weight>
      <location name="POINTMASS" unit="M">
         <x>  3.3 </x>
         <y> -3.3 </y>
         <z>  0.0 </z>
      </location>
   </pointmass>
   <pointmass name="Right Pylon3">
      <weight unit="LBS"> 0 </weight>
      <location name="POINTMASS" unit="M">
         <x>  4.4 </x>
         <y>  4.5 </y>
         <z> -0.1 </z>
      </location>
   </pointmass>
 </mass_balance>

 <ground_reactions>
  <contact type="BOGEY" name="NOSE_GEAR">
   <location unit="M">
     <x> -1.27 </x>
     <y>  0.00 </y>
     <z> -1.90 </z>
   </location>
   <static_friction>  0.80 </static_friction>
   <dynamic_friction> 0.50 </dynamic_friction>
   <rolling_friction> 0.02 </rolling_friction>
   <spring_coeff unit="LBS/FT">      40000 </spring_coeff>
   <damping_coeff unit="LBS/FT/SEC"> 20000 </damping_coeff>
   <max_steer unit="DEG">180</max_steer>
   <brake_group>NONE</brake_group>
   <retractable>1</retractable>
  </contact>

  <contact type="BOGEY" name="LEFT_GEAR">
   <location unit="M">
     <x>  3.6 </x>
     <y> -1.9 </y>
     <z> -1.9 </z>
   </location>
   <static_friction>  0.80 </static_friction>
   <dynamic_friction> 0.50 </dynamic_friction>
   <rolling_friction> 0.02 </rolling_friction>
   <spring_coeff unit="LBS/FT">      80967.60 </spring_coeff>
   <damping_coeff unit="LBS/FT/SEC"> 40483.80 </damping_coeff>
   <max_steer unit="DEG">0</max_steer>
   <brake_group>LEFT</brake_group>
   <retractable>1</retractable>
  </contact>

  <contact type="BOGEY" name="RIGHT_GEAR">
   <location unit="M">
     <x>  3.6 </x>
     <y>  1.9 </y>
     <z> -1.9 </z>
   </location>
   <static_friction>  0.80 </static_friction>
   <dynamic_friction> 0.50 </dynamic_friction>
   <rolling_friction> 0.02 </rolling_friction>
   <spring_coeff unit="LBS/FT">      80967.60 </spring_coeff>
   <damping_coeff unit="LBS/FT/SEC"> 40483.80 </damping_coeff>
   <max_steer unit="DEG">0</max_steer>
   <brake_group>RIGHT</brake_group>
   <retractable>1</retractable>
  </contact>

  <contact type="STRUCTURE" name="NOSE">
    <location unit="M">
     <x> -9.3 </x>
     <y>  0.0 </y>
     <z>  0.0 </z>
    </location>
    <static_friction>  1.00 </static_friction>
    <dynamic_friction> 1.00 </dynamic_friction>
    <spring_coeff unit="LBS/FT">      80967.60 </spring_coeff>
    <damping_coeff unit="LBS/FT/SEC"> 80967.60 </damping_coeff>
  </contact>
  <contact type="STRUCTURE" name="LEFT_WING">
    <location unit="M">
     <x>  7.0 </x>
     <y> -6.8 </y>
     <z>  0.4 </z>
    </location>
    <static_friction>  1.00 </static_friction>
    <dynamic_friction> 1.00 </dynamic_friction>
    <spring_coeff unit="LBS/FT">      80967.60 </spring_coeff>
    <damping_coeff unit="LBS/FT/SEC"> 80967.60 </damping_coeff>
  </contact>
  <contact type="STRUCTURE" name="RIGHT_WING">
    <location unit="M">
     <x>  7.0 </x>
     <y>  6.8 </y>
     <z>  0.4 </z>
    </location>
    <static_friction>  1.00 </static_friction>
    <dynamic_friction> 1.00 </dynamic_friction>
    <spring_coeff unit="LBS/FT">      80967.60 </spring_coeff>
    <damping_coeff unit="LBS/FT/SEC"> 80967.60 </damping_coeff>
  </contact>
  <contact type="STRUCTURE" name="TAIL">
    <location unit="M">
     <x>  9.7 </x>
     <y>  0.0 </y>
     <z> -0.4 </z>
    </location>
    <static_friction>  1.00 </static_friction>
    <dynamic_friction> 1.00 </dynamic_friction>
    <spring_coeff unit="LBS/FT">      80967.60 </spring_coeff>
    <damping_coeff unit="LBS/FT/SEC"> 80967.60 </damping_coeff>
  </contact>
  <contact type="STRUCTURE" name="LEFT_BELLY">
    <location unit="M">
     <x>  0.9 </x>
     <y> -0.8 </y>
     <z> -0.4 </z>
    </location>
    <static_friction>  1.00 </static_friction>
    <dynamic_friction> 1.00 </dynamic_friction>
    <spring_coeff unit="LBS/FT">      80967.60 </spring_coeff>
    <damping_coeff unit="LBS/FT/SEC"> 80967.60 </damping_coeff>
  </contact>
  <contact type="STRUCTURE" name="RIGHT_BELLY">
    <location unit="M">
     <x>  0.9 </x>
     <y>  0.8 </y>
     <z> -0.4 </z>
    </location>
    <static_friction>  1.00 </static_friction>
    <dynamic_friction> 1.00 </dynamic_friction>
    <spring_coeff unit="LBS/FT">      80967.60 </spring_coeff>
    <damping_coeff unit="LBS/FT/SEC"> 80967.60 </damping_coeff>
  </contact>
  <contact type="STRUCTURE" name="LEFT_FIN">
    <location unit="M">
     <x>  9.4 </x>
     <y> -1.6 </y>
     <z>  0.9 </z>
    </location>
    <static_friction>  1.00 </static_friction>
    <dynamic_friction> 1.00 </dynamic_friction>
    <spring_coeff unit="LBS/FT">      80967.60 </spring_coeff>
    <damping_coeff unit="LBS/FT/SEC"> 80967.60 </damping_coeff>
  </contact>
  <contact type="STRUCTURE" name="RIGHT_FIN">
    <location unit="M">
     <x>  9.4 </x>
     <y>  1.6 </y>
     <z>  3.9 </z>
    </location>
    <static_friction>  1.00 </static_friction>
    <dynamic_friction> 1.00 </dynamic_friction>
    <spring_coeff unit="LBS/FT">      80967.60 </spring_coeff>
    <damping_coeff unit="LBS/FT/SEC"> 80967.60 </damping_coeff>
  </contact>
 </ground_reactions>

 <propulsion>
   <engine file="Tumansky-R15BD-300">
    <location unit="M">
      <x> 6.0 </x>
      <y>-0.8 </y>
      <z> 0.5 </z>
    </location>
    <orient unit="DEG">
      <pitch> 0.0 </pitch>
      <roll>  0.0 </roll>
      <yaw>   0.0 </yaw>
    </orient>
    <feed>0</feed>
    <feed>1</feed>
    <feed>2</feed>
    <feed>3</feed>
    <feed>4</feed>
    <feed>5</feed>
    <thruster file="direct">
     <location unit="M">
       <x> 7.0 </x>
       <y>-0.8 </y>
       <z> 0.5 </z>
     </location>
     <orient unit="DEG">
       <pitch> 0.0 </pitch>
       <roll>  0.0 </roll>
       <yaw>   0.0 </yaw>
     </orient>
    </thruster>
  </engine>

   <engine file="Tumansky-R15BD-300">
    <location unit="M">
      <x> 6.0 </x>
      <y> 0.8 </y>
      <z> 0.5 </z>
    </location>
    <orient unit="DEG">
      <pitch> 0.0 </pitch>
      <roll>  0.0 </roll>
      <yaw>   0.0 </yaw>
    </orient>
    <feed>0</feed>
    <feed>1</feed>
    <feed>2</feed>
    <feed>3</feed>
    <feed>4</feed>
    <feed>5</feed>
    <thruster file="direct">
     <location unit="M">
       <x> 7.0 </x>
       <y> 0.8 </y>
       <z> 0.5 </z>
     </location>
     <orient unit="DEG">
       <pitch> 0.0 </pitch>
       <roll>  0.0 </roll>
       <yaw>   0.0 </yaw>
     </orient>
    </thruster>
  </engine>

  <tank type="FUEL" number="0">
     <location unit="M">
       <x>  2.5 </x>
       <y>  0.0 </y>
       <z>  0.5 </z>
     </location>
     <capacity unit="KG"> 3000 </capacity> <!-- 2300kg, rest in fin tanks -->
     <contents unit="KG"> 3000 </contents>
  </tank>

  <tank type="FUEL" number="1">
     <location unit="M">
       <x>  2.5 </x>
       <y> -0.7 </y>
       <z>  1.1 </z>
     </location>
     <capacity unit="KG"> 4500 </capacity>
     <contents unit="KG"> 3000 </contents>
  </tank>

  <tank type="FUEL" number="2">
     <location unit="M">
       <x>  2.5 </x>
       <y>  0.7 </y>
       <z>  1.1 </z>
     </location>
     <capacity unit="KG"> 4500 </capacity>
     <contents unit="KG"> 3000 </contents>
  </tank>

  <tank type="FUEL" number="3">
     <location unit="M">
       <x>  5.0 </x>
       <y> -3.5 </y>
       <z>  0.7 </z>
     </location>
     <capacity unit="KG"> 1000 </capacity>
     <contents unit="KG">    0 </contents>
  </tank>

  <tank type="FUEL" number="4">
     <location unit="M">
       <x>  5.0 </x>
       <y>  3.5 </y>
       <z>  0.7 </z>
     </location>
     <capacity unit="KG"> 1000 </capacity>
     <contents unit="KG">    0 </contents>
  </tank>

  <tank type="FUEL" number="5">
     <location unit="M">
       <x>  6.5 </x>
       <y>  0.0 </y>
       <z>  0.9 </z>
     </location>
     <capacity unit="KG">  600 </capacity>
     <contents unit="KG">    0 </contents>
  </tank>
 </propulsion>

 <flight_control file="Systems/jsb-controls"/>
 <aerodynamics file="MiG-25-aerodynamics.xml"/>
 <system file="jsb-brake"/>
 <system file="jsb-electric"/>

<!--
 <output name="/tmp/jsbsim.csv" type="CSV" rate="10">
          <property>position/h-agl-ft</property>
          <property>velocities/u-fps</property>
 </output>
-->
</fdm_config>
